# OpenSim document version 40000
Model LaiArnold2017_refined_P010:
  gravity: 0 -9.80665 0
  length_units: meters
  force_units: N
  credits:
    Rajagopal Model w/ updated knee, modified for movements involving high hip and knee flexion
  publications:
    Lai,A.K.M., Arnold, A.S., Wakeling, J.M. (2017) Why are antagonist muscles co-activated in my simulation? A musculoskeletal model for analysing human locomotor tasks. Annals of Biomedical Engineering; Clancy, C.E., Gatti, A.G., Ong, C.F., Maly, M.R., Delp, S.L. (2023) Muscle-Driven Simulations and Experimental Data of Cycling. Scientific Reports.
  Ground
  BodySet:
    Body pelvis: mass=45.18938 [kg] mass_center=(-0.01539336 0 -0.002089241) inertia=(0.113022 0.113022 0.053826 0 0 0)
        meshes=(r_pelvis.vtp l_pelvis.vtp sacrum.vtp)
      WrapCylinder Gmax1_at_pelvis_r: xyz_body_rotation=(-0.6 0.45 0) translation=(-0.073501 -0.0974548 0.0662229)
          quadrant=-x radius=0.03983987 length=0.1554377
      WrapCylinder Gmax2_at_pelvis_r: xyz_body_rotation=(-0.75 0.39 0) translation=(-0.0763647 -0.0817045 0.0738222)
          quadrant=all radius=0.04000015 length=0.1027928
      WrapCylinder Gmax3_at_pelvis_r: xyz_body_rotation=(-0.1 0 0) translation=(-0.0792284 -0.0866265 0.0738222)
          quadrant=all radius=0.03880022 length=0.1084659
      WrapCylinder Gmax1_at_pelvis_l: xyz_body_rotation=(0.6 -0.45 0) translation=(-0.073501 -0.0974548 -0.0662229)
          quadrant=-x radius=0.03983987 length=0.1554377
      WrapCylinder Gmax2_at_pelvis_l: xyz_body_rotation=(0.75 -0.39 0) translation=(-0.0763647 -0.0817045 -0.0738222)
          quadrant=all radius=0.04000015 length=0.1027928
      WrapCylinder Gmax3_at_pelvis_l: xyz_body_rotation=(0.1 0 0) translation=(-0.0792284 -0.0866265 -0.0738222)
          quadrant=all radius=0.03880022 length=0.1084659
      WrapCylinder PS_at_brim_r: xyz_body_rotation=(-0.25 -0.27 0.1) translation=(-0.0706373 -0.0590635 0.0712167)
          quadrant=-y radius=0.04887132 length=0.1071278
      WrapCylinder PS_at_brim_l: xyz_body_rotation=(0.25 0.27 0.1) translation=(-0.0706373 -0.0590635 -0.0712167)
          quadrant=-y radius=0.04887132 length=0.1071278
      WrapCylinder IL_at_brim_r: xyz_body_rotation=(-0.32 -0.24 0.9) translation=(-0.0677737 -0.0639855 0.082073)
          quadrant=-y radius=0.05371867 length=0.1069533
      WrapCylinder IL_at_brim_l: xyz_body_rotation=(0.32 0.24 0.9) translation=(-0.0677737 -0.0639855 -0.082073)
          quadrant=-y radius=0.05371867 length=0.1069533
    Body femur_r: mass=9.202185 mass_center=(0 -0.182972 0) inertia=(0.145964 0.0252351 0.145964 0 0 0)
        meshes=femur_r.vtp
      WrapCylinder GasLat_at_condyles_r: translation=(0.00426234 -0.441286 0) quadrant=all radius=0.02507406
          length=0.08524676
      WrapCylinder GasMed_at_condyles_r: translation=(0.00426234 -0.441286 0) quadrant=all radius=0.02410968
          length=0.08524676
      WrapCylinder KnExt_at_fem_r: xyz_body_rotation=(-0.0623366 0.0507601 0)
          translation=(0.00305889 -0.433463 0.0017826) quadrant=all radius=0.02409998 length=0.08534472
      WrapCylinder KnExtVL_at_fem_r: xyz_body_rotation=(-0.0623366 0.0507601 0)
          translation=(0.0016097 -0.433463 0.0017826) quadrant=all radius=0.02409998 length=0.08534472
      WrapCylinder AB_at_femshaft_r: xyz_body_rotation=(1.66157 0.186644 0) translation=(0.012483 -0.121187 0.0199179)
          quadrant=all radius=0.01415385 length=0.07474428
      WrapCylinder AL_at_femshaft_r: xyz_body_rotation=(1.77711 0.136489 0) translation=(0.0261986 -0.249605 0.0128839)
          quadrant=all radius=0.01728576 length=0.1064265
      WrapCylinder AMprox_at_femshaft_r: xyz_body_rotation=(1.61126 0.18656 0)
          translation=(0.00441833 -0.0784572 0.0216552) quadrant=all radius=0.01808273 length=0.07483458
      WrapCylinder AMmid_at_femshaft_r: xyz_body_rotation=(1.61139 0.13656 0)
          translation=(0.0196174 -0.172974 0.0175474) quadrant=all radius=0.01829726 length=0.1286709
      WrapCylinder AMdist_at_femshaft_r: xyz_body_rotation=(1.71188 0.186636 0)
          translation=(0.0269435 -0.280632 0.00798302) quadrant=all radius=0.0187309 length=0.2131036
      WrapCylinder AMisch_at_condyles_r: xyz_body_rotation=(1.71115 -0.463363 0)
          translation=(-0.0193093 -0.405586 -0.002689) quadrant=all radius=0.03516219 length=0.2477267
      WrapCylinder PECT_at_femshaft_r: xyz_body_rotation=(1.81295 0.276344 0)
          translation=(0.00518789 -0.090951 0.0259495) quadrant=all radius=0.01302719 length=0.05251951
    Body tibia_r: mass=3.667953 mass_center=(0 -0.167683 0) inertia=(0.0404797 0.00458541 0.0404797 0 0 0)
        meshes=(tibia_r.vtp r_fibula.vtp)
      WrapCylinder GasLat_at_shank_r: xyz_body_rotation=(2.96723 -0.279725 -1.47812)
          translation=(-0.00705447 -0.0664626 -0.00314591) quadrant=-y radius=0.05095997 length=0.09518168
      WrapCylinder GasMed_at_shank_r: xyz_body_rotation=(2.96723 0.0279725 -1.47812)
          translation=(-0.00705447 -0.0664626 -0.00314591) quadrant=-y radius=0.05466887 length=0.09516949
      WrapCylinder GR_at_condyles_r: xyz_body_rotation=(0 -0.4 0) translation=(-0.00285992 -0.0179629 0) quadrant=all
          radius=0.0333261 length=0.09533072
      WrapCylinder SM_at_condyles_r: xyz_body_rotation=(0 -0.1 0) translation=(-0.000953307 -0.0179629 0) quadrant=all
          radius=0.03193752 length=0.09533072
      WrapCylinder ST_at_condyles_r: xyz_body_rotation=(0 -0.2 0) translation=(-0.00190661 -0.0184119 0) quadrant=all
          radius=0.03934332 length=0.09533072
      WrapCylinder BF140_at_gastroc_r: translation=(-0.037179 -0.0538886 0) quadrant=y radius=0.02684603
          length=0.1429961
    Body patella_r: mass=0.08528053 mass_center=(0.00153444 0.0284145 0)
        inertia=(2.60518e-6 9.69633e-6 9.69633e-6 0 0 0) meshes=r_patella.vtp
    Body talus_r: mass=0.09893333 mass_center=(0 0 0) inertia=(0.00206206 0.00154965 0.00154965 0 0 0)
        meshes=r_talus.vtp
    Body calcn_r: mass=1.236667 mass_center=(0.102392 0.0477621 0) inertia=(0.00288688 0.00476258 0.00476258 0 0 0)
        meshes=r_foot.vtp
    Body toes_r: mass=0.2142896 mass_center=(0.0354277 0.00955242 -0.0229105)
        inertia=(0.000206206 0.000258688 0.000258688 0 0 0) meshes=r_bofoot.vtp
    Body femur_l: mass=9.202185 mass_center=(0 -0.187299 0) inertia=(0.151663 0.0238689 0.151663 0 0 0)
        meshes=femur_l.vtp
      WrapCylinder GasLat_at_condyles_l: translation=(0.00414535 -0.451722 0) quadrant=all radius=0.02510082
          length=0.08290706
      WrapCylinder GasMed_at_condyles_l: translation=(0.00414535 -0.451722 0) quadrant=all radius=0.0241354
          length=0.08290706
      WrapCylinder KnExt_at_fem_l: xyz_body_rotation=(0.0623366 -0.0507601 0)
          translation=(0.00297494 -0.443715 -0.00173368) quadrant=all radius=0.02412385 length=0.08302989
      WrapCylinder KnExtVL_at_fem_l: xyz_body_rotation=(0.0623366 -0.0507601 0)
          translation=(0.00156552 -0.443715 -0.00173368) quadrant=all radius=0.02412385 length=0.08302989
      WrapCylinder AB_at_femshaft_l: xyz_body_rotation=(-1.66157 -0.186644 0)
          translation=(0.0121404 -0.124053 -0.0193712) quadrant=all radius=0.01379004 length=0.07641137
      WrapCylinder AL_at_femshaft_l: xyz_body_rotation=(-1.77711 -0.136489 0)
          translation=(0.0254796 -0.255508 -0.0125303) quadrant=all radius=0.01685359 length=0.1087403
      WrapCylinder AMprox_at_femshaft_l: xyz_body_rotation=(-1.61126 -0.18656 0)
          translation=(0.00429706 -0.0803127 -0.0210609) quadrant=all radius=0.01761318 length=0.07651908
      WrapCylinder AMmid_at_femshaft_l: xyz_body_rotation=(-1.61139 -0.13656 0)
          translation=(0.019079 -0.177065 -0.0170658) quadrant=all radius=0.01781035 length=0.1316324
      WrapCylinder AMdist_at_femshaft_l: xyz_body_rotation=(-1.71188 -0.186636 0)
          translation=(0.026204 -0.287269 -0.00776391) quadrant=all radius=0.01825799 length=0.2177795
      WrapCylinder AMisch_at_condyles_l: xyz_body_rotation=(-1.71115 0.463363 0)
          translation=(-0.0187794 -0.415178 0.0026152) quadrant=all radius=0.03448707 length=0.2517654
      WrapCylinder PECT_at_femshaft_l: xyz_body_rotation=(-1.81295 -0.276344 0)
          translation=(0.0050455 -0.093102 -0.0252373) quadrant=all radius=0.01273643 length=0.05354114
    Body tibia_l: mass=3.667953 mass_center=(0 -0.166139 0) inertia=(0.0397417 0.00450968 0.0397417 0 0 0)
        meshes=(tibia_l.vtp l_fibula.vtp)
      WrapCylinder GasLat_at_shank_l: xyz_body_rotation=(-2.96723 0.279725 -1.47812)
          translation=(-0.00699598 -0.0658505 0.00311983) quadrant=-y radius=0.05051545 length=0.09439024
      WrapCylinder GasMed_at_shank_l: xyz_body_rotation=(-2.96723 -0.0279725 -1.47812)
          translation=(-0.00699598 -0.0658505 0.00311983) quadrant=-y radius=0.05419202 length=0.09437798
      WrapCylinder GR_at_condyles_l: xyz_body_rotation=(0 0.4 0) translation=(-0.00283621 -0.0177974 0) quadrant=all
          radius=0.03303492 length=0.09454021
      WrapCylinder SM_at_condyles_l: xyz_body_rotation=(0 0.1 0) translation=(-0.000945402 -0.0177974 0) quadrant=all
          radius=0.03165846 length=0.09454021
      WrapCylinder ST_at_condyles_l: xyz_body_rotation=(0 0.2 0) translation=(-0.0018908 -0.0182424 0) quadrant=all
          radius=0.03899955 length=0.09454021
      WrapCylinder BF140_at_gastroc_l: translation=(-0.0368707 -0.0533923 0) quadrant=all radius=0.02661146
          length=0.1418103
    Body patella_l: mass=0.08528053 mass_center=(0.00153444 0.0290865 0)
        inertia=(2.6668e-6 9.72713e-6 9.72713e-6 0 0 0) meshes=l_pat.vtp
    Body talus_l: mass=0.09893333 mass_center=(0 0 0) inertia=(0.00218877 0.00163439 0.00163439 0 0 0)
        meshes=l_talus.vtp
    Body calcn_l: mass=1.236667 mass_center=(0.104482 0.0480836 0) inertia=(0.00306427 0.00498817 0.00498817 0 0 0)
        meshes=l_foot.vtp
    Body toes_l: mass=0.2142896 mass_center=(0.0361509 0.00961672 0.0241557)
        inertia=(0.000218877 0.00027144 0.00027144 0 0 0) meshes=l_bofoot.vtp
  JointSet:
    CustomJoint ground_pelvis: socket_parent_frame=ground_offset socket_child_frame=pelvis_offset
      Coordinate pelvis_tilt: default_value=0 range=(-1.570796 1.570796) clamped=true
      Coordinate pelvis_list: default_value=0 range=(-1.570796 1.570796) clamped=true
      Coordinate pelvis_rotation: default_value=0 range=(-1.570796 1.570796) clamped=true
      Coordinate pelvis_tx: default_value=0 range=(-5 5) clamped=true
      Coordinate pelvis_ty: default_value=0.93 range=(-1 2) clamped=true
      Coordinate pelvis_tz: default_value=0 range=(-3 3) clamped=true
      PhysicalOffsetFrame ground_offset: socket_parent=/ground translation=(0 0 0) [meters]
      PhysicalOffsetFrame pelvis_offset: socket_parent=/bodyset/pelvis translation=(0 0 0)
      SpatialTransform:
        TransformAxis rotation1: coordinates=pelvis_tilt axis=(0 0 1) LinearFunction(coefficients=1 0)
        TransformAxis rotation2: coordinates=pelvis_list axis=(1 0 0) LinearFunction(coefficients=1 0)
        TransformAxis rotation3: coordinates=pelvis_rotation axis=(0 1 0) LinearFunction(coefficients=1 0)
        TransformAxis translation1: coordinates=pelvis_tx axis=(1 0 0) LinearFunction(coefficients=1 0)
        TransformAxis translation2: coordinates=pelvis_ty axis=(0 1 0) LinearFunction(coefficients=1 0)
        TransformAxis translation3: coordinates=pelvis_tz axis=(0 0 1) LinearFunction(coefficients=1 0)
    CustomJoint hip_r: socket_parent_frame=pelvis_offset socket_child_frame=femur_r_offset
      Coordinate hip_flexion_r: default_value=2.332052e-9 range=(-0.5235988 2.094395) clamped=true
      Coordinate hip_adduction_r: default_value=-1.199293e-9 range=(-0.8726646 0.5235988) clamped=true
      Coordinate hip_rotation_r: default_value=0 range=(-0.6981317 0.6981317) clamped=true
      PhysicalOffsetFrame pelvis_offset: socket_parent=/bodyset/pelvis translation=(-0.0537187 -0.0772649 0.0838751)
      PhysicalOffsetFrame femur_r_offset: socket_parent=/bodyset/femur_r translation=(0 0 0)
      SpatialTransform: axes_held_at_zero=(translation1 translation2 translation3)
        TransformAxis rotation1: coordinates=hip_flexion_r axis=(0 0 1) LinearFunction(coefficients=1 0)
        TransformAxis rotation2: coordinates=hip_adduction_r axis=(1 0 0) LinearFunction(coefficients=1 0)
        TransformAxis rotation3: coordinates=hip_rotation_r axis=(0 1 0) LinearFunction(coefficients=1 0)
    CustomJoint walker_knee_r: socket_parent_frame=femur_r_offset socket_child_frame=tibia_r_offset
      Coordinate knee_angle_r: default_value=4.877666e-5 range=(0 2.443461) clamped=true
      PhysicalOffsetFrame femur_r_offset: socket_parent=/bodyset/femur_r translation=(-0.0038361 -0.440855 -0.00149182)
          orientation=(-1.64157 1.44618 1.5708) [radians]
      PhysicalOffsetFrame tibia_r_offset: socket_parent=/bodyset/tibia_r
          translation=(-0.00771182 -0.00317476 -0.00141541) orientation=(-1.64157 1.44618 1.5708)
      SpatialTransform:
        TransformAxis rotation1: coordinates=knee_angle_r axis=(1 0 0) LinearFunction(coefficients=1 0)
        TransformAxis rotation2: coordinates=knee_angle_r axis=(0 0 1)
          SimmSpline: x=(0 0.174533 0.349066 0.523599 0.698132 0.872665 1.0472 1.22173 1.39626 1.5708 1.74533 1.91986 2.0944)
              y=(0 0.0126809 0.0226969 0.0296054 0.0332049 0.0335354 0.0308779 0.0257548 0.0189295 0.011407 0.00443314 -0.00050475 -0.0016782)
        TransformAxis rotation3: coordinates=knee_angle_r axis=(0 1 0)
          SimmSpline: x=(0 0.174533 0.349066 0.523599 0.698132 0.872665 1.0472 1.22173 1.39626 1.5708 1.74533 1.91986 2.0944)
              y=(0 0.059461 0.109399 0.150618 0.18392 0.210107 0.229983 0.24435 0.254012 0.25977 0.262428 0.262788 0.261654)
        TransformAxis translation1: coordinates=knee_angle_r axis=(1 0 0)
          MultiplierFunction: scale=0.8524676
            SimmSpline: x=(0 0.174533 0.349066 0.523599 0.698132 0.872665 1.0472 1.22173 1.39626 1.5708 1.74533 1.91986 2.0944)
                y=(0 5.3e-5 0.000188 0.000378 0.000597 0.000825 0.001045 0.001247 0.00142 0.001558 0.001661 0.001728 0.00176)
        TransformAxis translation2: coordinates=knee_angle_r axis=(0 1 0)
          MultiplierFunction: scale=1.076307
            SimmSpline: x=(0 0.174533 0.349066 0.523599 0.698132 0.872665 1.0472 1.22173 1.39626 1.5708 1.74533 1.91986 2.0944)
                y=(0 0.000301 0.000143 -0.000401 -0.001233 -0.002243 -0.003316 -0.004346 -0.005239 -0.005924 -0.006361 -0.006539 -0.00648)
        TransformAxis translation3: coordinates=knee_angle_r axis=(0 0 1)
          MultiplierFunction: scale=0.8524676
            SimmSpline: x=(0 0.174533 0.349066 0.523599 0.698132 0.872665 1.0472 1.22173 1.39626 1.5708 1.74533 1.91986 2.0944)
                y=(0 0.001055 0.002061 0.00289 0.003447 0.003676 0.003559 0.00311 0.002373 0.001418 0.000329 -0.000805 -0.001898)
    CustomJoint patellofemoral_r: socket_parent_frame=femur_r_offset socket_child_frame=patella_r_offset
      Coordinate knee_angle_r_beta: default_value=4.877666e-5 range=(-99999.9 99999.9) clamped=false
      PhysicalOffsetFrame femur_r_offset: socket_parent=/bodyset/femur_r translation=(-0.00689646 -0.43909 -0.00234429)
      PhysicalOffsetFrame patella_r_offset: socket_parent=/bodyset/patella_r translation=(0 0 0)
      SpatialTransform: axes_held_at_zero=(rotation2 rotation3)
        TransformAxis rotation1: coordinates=knee_angle_r_beta axis=(0 0 1)
          SimmSpline: x=(0 0.174533 0.349066 0.523599 0.698132 0.872665 1.0472 1.22173 1.39626 1.5708 1.74533 1.91986 2.0944)
              y=(0.00113686 -0.00629212 -0.105582 -0.253683 -0.414245 -0.579047 -0.747244 -0.91799 -1.09044 -1.26379 -1.43763 -1.61186 -1.78634)
        TransformAxis translation1: coordinates=knee_angle_r_beta axis=(1 0 0)
          MultiplierFunction: scale=0.8524676
            SimmSpline f9: x=(0 0.174533 0.349066 0.523599 0.698132 0.872665 1.0472 1.22173 1.39626 1.5708 1.74533 1.91986 2.0944)
                y=(0.0524 0.0488 0.0437 0.0371 0.0296 0.0216 0.0136 0.0057 -0.0019 -0.0088 -0.0148 -0.0196 -0.0227)
        TransformAxis translation2: coordinates=knee_angle_r_beta axis=(0 1 0)
          MultiplierFunction: scale=1.076307
            SimmSpline f10: x=(0 0.174533 0.349066 0.523599 0.698132 0.872665 1.0472 1.22173 1.39626 1.5708 1.74533 1.91986 2.0944)
                y=(-0.0108 -0.019 -0.0263 -0.0322 -0.0367 -0.0395 -0.0408 -0.0404 -0.0384 -0.0349 -0.0301 -0.0245 -0.0187)
        TransformAxis translation3: axis=(0 0 1) MultiplierFunction(scale=0.8524676, Constant(value=0.00275))
    PinJoint ankle_r: socket_parent_frame=tibia_r_offset socket_child_frame=talus_r_offset
      Coordinate ankle_angle_r: default_value=-1.182866e-9 range=(-0.6981317 0.5235988) clamped=true
      PhysicalOffsetFrame tibia_r_offset: socket_parent=/bodyset/tibia_r translation=(-0.00953307 -0.359257 0)
          orientation=(0.175895 -0.105208 0.0186622)
      PhysicalOffsetFrame talus_r_offset: socket_parent=/bodyset/talus_r translation=(0 0 0)
          orientation=(0.175895 -0.105208 0.0186622)
    PinJoint subtalar_r: socket_parent_frame=talus_r_offset socket_child_frame=calcn_r_offset
      Coordinate subtalar_angle_r: default_value=0 range=(-0.5235987 0.5235987) clamped=true locked=true
      PhysicalOffsetFrame talus_r_offset: socket_parent=/bodyset/talus_r translation=(-0.0499366 -0.0667873 0.0103686)
          orientation=(-1.76819 0.906223 1.8196)
      PhysicalOffsetFrame calcn_r_offset: socket_parent=/bodyset/calcn_r translation=(0 0 0)
          orientation=(-1.76819 0.906223 1.8196)
    PinJoint mtp_r: socket_parent_frame=calcn_r_offset socket_child_frame=toes_r_offset
      Coordinate mtp_angle_r: default_value=0 range=(-0.5235988 0.5235988) clamped=true locked=true
      PhysicalOffsetFrame calcn_r_offset: socket_parent=/bodyset/calcn_r translation=(0.183077 -0.00318414 0.00141391)
          orientation=(-3.14159 0.619901 0)
      PhysicalOffsetFrame toes_r_offset: socket_parent=/bodyset/toes_r translation=(0 0 0)
          orientation=(-3.14159 0.619901 0)
    CustomJoint hip_l: socket_parent_frame=pelvis_offset socket_child_frame=femur_l_offset
      Coordinate hip_flexion_l: default_value=2.332052e-9 range=(-0.5235988 2.094395) clamped=true
      Coordinate hip_adduction_l: default_value=-1.199293e-9 range=(-0.8726646 0.5235988) clamped=true
      Coordinate hip_rotation_l: default_value=0 range=(-0.6981317 0.6981317) clamped=true
      PhysicalOffsetFrame pelvis_offset: socket_parent=/bodyset/pelvis translation=(-0.0537187 -0.0772649 -0.0838751)
      PhysicalOffsetFrame femur_l_offset: socket_parent=/bodyset/femur_l translation=(0 0 0)
      SpatialTransform: axes_held_at_zero=(translation1 translation2 translation3)
        TransformAxis rotation1: coordinates=hip_flexion_l axis=(0 0 1) LinearFunction(coefficients=1 0)
        TransformAxis rotation2: coordinates=hip_adduction_l axis=(1 0 0) LinearFunction(coefficients=-1 0)
        TransformAxis rotation3: coordinates=hip_rotation_l axis=(0 1 0) LinearFunction(coefficients=-1 0)
    CustomJoint walker_knee_l: socket_parent_frame=femur_l_offset socket_child_frame=tibia_l_offset
      Coordinate knee_angle_l: default_value=4.877992e-5 range=(0 2.443461) clamped=true
      PhysicalOffsetFrame femur_l_offset: socket_parent=/bodyset/femur_l translation=(-0.00373082 -0.451282 0.00145087)
          orientation=(1.64157 -1.44618 1.5708)
      PhysicalOffsetFrame tibia_l_offset: socket_parent=/bodyset/tibia_l
          translation=(-0.00764787 -0.00314552 0.00140368) orientation=(1.64157 -1.44618 1.5708)
      SpatialTransform:
        TransformAxis rotation1: coordinates=knee_angle_l axis=(-1 0 0) LinearFunction(coefficients=1 0)
        TransformAxis rotation2: coordinates=knee_angle_l axis=(0 0 1)
          SimmSpline: x=(0 0.174533 0.349066 0.523599 0.698132 0.872665 1.0472 1.22173 1.39626 1.5708 1.74533 1.91986 2.0944)
              y=(0 0.0126809 0.0226969 0.0296054 0.0332049 0.0335354 0.0308779 0.0257548 0.0189295 0.011407 0.00443314 -0.00050475 -0.0016782)
        TransformAxis rotation3: coordinates=knee_angle_l axis=(0 1 0)
          SimmSpline: x=(0 0.174533 0.349066 0.523599 0.698132 0.872665 1.0472 1.22173 1.39626 1.5708 1.74533 1.91986 2.0944)
              y=(0 -0.059461 -0.109399 -0.150618 -0.18392 -0.210107 -0.229983 -0.24435 -0.254012 -0.25977 -0.262428 -0.262788 -0.261654)
        TransformAxis translation1: coordinates=knee_angle_l axis=(1 0 0)
          MultiplierFunction: scale=0.8290706
            SimmSpline: x=(0 0.174533 0.349066 0.523599 0.698132 0.872665 1.0472 1.22173 1.39626 1.5708 1.74533 1.91986 2.0944)
                y=(0 5.3e-5 0.000188 0.000378 0.000597 0.000825 0.001045 0.001247 0.00142 0.001558 0.001661 0.001728 0.00176)
        TransformAxis translation2: coordinates=knee_angle_l axis=(0 1 0)
          MultiplierFunction: scale=1.101761
            SimmSpline: x=(0 0.174533 0.349066 0.523599 0.698132 0.872665 1.0472 1.22173 1.39626 1.5708 1.74533 1.91986 2.0944)
                y=(0 0.000301 0.000143 -0.000401 -0.001233 -0.002243 -0.003316 -0.004346 -0.005239 -0.005924 -0.006361 -0.006539 -0.00648)
        TransformAxis translation3: coordinates=knee_angle_l axis=(0 0 1)
          MultiplierFunction: scale=0.8290706
            SimmSpline: x=(0 0.174533 0.349066 0.523599 0.698132 0.872665 1.0472 1.22173 1.39626 1.5708 1.74533 1.91986 2.0944)
                y=(0 -0.001055 -0.002061 -0.00289 -0.003447 -0.003676 -0.003559 -0.00311 -0.002373 -0.001418 -0.000329 0.000805 0.001898)
    CustomJoint patellofemoral_l: socket_parent_frame=femur_l_offset socket_child_frame=patella_l_offset
      Coordinate knee_angle_l_beta: default_value=4.877992e-5 range=(-99999.9 99999.9) clamped=false
      PhysicalOffsetFrame femur_l_offset: socket_parent=/bodyset/femur_l translation=(-0.00670718 -0.449475 0.00227994)
      PhysicalOffsetFrame patella_l_offset: socket_parent=/bodyset/patella_l translation=(0 0 0)
      SpatialTransform: axes_held_at_zero=(rotation2 rotation3)
        TransformAxis rotation1: coordinates=knee_angle_l_beta axis=(0 0 1)
          SimmSpline: x=(0 0.174533 0.349066 0.523599 0.698132 0.872665 1.0472 1.22173 1.39626 1.5708 1.74533 1.91986 2.0944)
              y=(0.00113686 -0.00629212 -0.105582 -0.253683 -0.414245 -0.579047 -0.747244 -0.91799 -1.09044 -1.26379 -1.43763 -1.61186 -1.78634)
        TransformAxis translation1: coordinates=knee_angle_l_beta axis=(1 0 0)
          MultiplierFunction: scale=0.8290706
            SimmSpline f23: x=(0 0.174533 0.349066 0.523599 0.698132 0.872665 1.0472 1.22173 1.39626 1.5708 1.74533 1.91986 2.0944)
                y=(0.0524 0.0488 0.0437 0.0371 0.0296 0.0216 0.0136 0.0057 -0.0019 -0.0088 -0.0148 -0.0196 -0.0227)
        TransformAxis translation2: coordinates=knee_angle_l_beta axis=(0 1 0)
          MultiplierFunction: scale=1.101761
            SimmSpline f24: x=(0 0.174533 0.349066 0.523599 0.698132 0.872665 1.0472 1.22173 1.39626 1.5708 1.74533 1.91986 2.0944)
                y=(-0.0108 -0.019 -0.0263 -0.0322 -0.0367 -0.0395 -0.0408 -0.0404 -0.0384 -0.0349 -0.0301 -0.0245 -0.0187)
        TransformAxis translation3: axis=(0 0 1) MultiplierFunction(scale=0.8290706, Constant(value=-0.00275))
    PinJoint ankle_l: socket_parent_frame=tibia_l_offset socket_child_frame=talus_l_offset
      Coordinate ankle_angle_l: default_value=8.352658e-11 range=(-0.6981317 0.5235988) clamped=true
      PhysicalOffsetFrame tibia_l_offset: socket_parent=/bodyset/tibia_l translation=(-0.00945402 -0.355948 0)
          orientation=(-0.175895 0.105208 0.0186622)
      PhysicalOffsetFrame talus_l_offset: socket_parent=/bodyset/talus_l translation=(0 0 0)
          orientation=(-0.175895 0.105208 0.0186622)
    PinJoint subtalar_l: socket_parent_frame=talus_l_offset socket_child_frame=calcn_l_offset
      Coordinate subtalar_angle_l: default_value=0 range=(-0.5235987 0.5235987) clamped=true locked=true
      PhysicalOffsetFrame talus_l_offset: socket_parent=/bodyset/talus_l translation=(-0.050956 -0.0672369 -0.0109322)
          orientation=(1.76819 -0.906223 1.8196)
      PhysicalOffsetFrame calcn_l_offset: socket_parent=/bodyset/calcn_l translation=(0 0 0)
          orientation=(1.76819 -0.906223 1.8196)
    PinJoint mtp_l: socket_parent_frame=calcn_l_offset socket_child_frame=toes_l_offset
      Coordinate mtp_angle_l: default_value=0 range=(-0.5235988 0.5235988) clamped=true locked=true
      PhysicalOffsetFrame calcn_l_offset: socket_parent=/bodyset/calcn_l translation=(0.186814 -0.00320557 -0.00149075)
          orientation=(-3.14159 -0.619901 0)
      PhysicalOffsetFrame toes_l_offset: socket_parent=/bodyset/toes_l translation=(0 0 0)
          orientation=(-3.14159 -0.619901 0)
  ConstraintSet:
    CoordinateCouplerConstraint patellofemoral_knee_angle_r_con: independent_coordinate_names=knee_angle_r
        dependent_coordinate_name=knee_angle_r_beta scale_factor=1
        coupled_coordinates_function=LinearFunction(coefficients=1 0)
    CoordinateCouplerConstraint patellofemoral_knee_angle_l_con: independent_coordinate_names=knee_angle_l
        dependent_coordinate_name=knee_angle_l_beta scale_factor=1
        coupled_coordinates_function=LinearFunction(coefficients=1 0)
  ForceSet:
    Millard2012EquilibriumMuscle [values shared by the 80 below unless stated]: fiber_damping=0.01
        default_activation=0.01 minimum_activation=0.01
      ActiveForceLengthCurve: min_norm_active_fiber_length=0.25 transition_norm_fiber_length=0.77
          max_norm_active_fiber_length=1.9 shallow_ascending_slope=0.75 minimum_value=0
      ForceVelocityCurve: concentric_slope_at_vmax=0 concentric_slope_near_vmax=0.25 isometric_slope=5
          eccentric_slope_at_vmax=0 eccentric_slope_near_vmax=0.15 max_eccentric_velocity_force_multiplier=1.4
      FiberForceLengthCurve: strain_at_zero_force=0 strain_at_one_norm_force=0.7
      TendonForceLengthCurve
    Millard2012EquilibriumMuscle addbrev_r: max_isometric_force=625.8197 optimal_fiber_length=0.1084393
        tendon_slack_length=0.03728619 pennation_angle_at_optimal=0.1147809 [radians] ignore_tendon_compliance=true
      PathPoint P1: pelvis (-0.0182321 -0.0925329 0.0167186)
      PathPoint P2: femur_r (-0.00170494 -0.127004 0.0212264)
      PathWrap: wrap_object=AB_at_femshaft_r method=hybrid
    Millard2012EquilibriumMuscle addlong_r: max_isometric_force=916.8 optimal_fiber_length=0.1161896
        tendon_slack_length=0.1415316 pennation_angle_at_optimal=0.1377704
      PathPoint P1: pelvis (-0.00723555 -0.0875125 0.0204965)
      PathPoint P2: femur_r (0.00959879 -0.257636 0.0134946)
      PathWrap: wrap_object=AL_at_femshaft_r method=hybrid
    Millard2012EquilibriumMuscle addmagDist_r: max_isometric_force=597.2951 optimal_fiber_length=0.1929904
        tendon_slack_length=0.09516726 pennation_angle_at_optimal=0.194705 ignore_tendon_compliance=true
      PathPoint P1: pelvis (-0.0706755 -0.125677 0.0432294)
      PathPoint P2: femur_r (0.00959026 -0.28253 0.0164526)
      PathWrap: wrap_object=AMdist_at_femshaft_r method=hybrid
    Millard2012EquilibriumMuscle addmagIsch_r: max_isometric_force=597.2951 optimal_fiber_length=0.1700698
        tendon_slack_length=0.2355533 pennation_angle_at_optimal=0.1680443
      PathPoint P1: pelvis (-0.0855475 -0.127735 0.0452813)
      PathPoint P2: femur_r (0.00410037 -0.417575 -0.0279013)
      PathWrap: wrap_object=AMisch_at_condyles_r method=hybrid
    Millard2012EquilibriumMuscle addmagMid_r: max_isometric_force=597.2951 optimal_fiber_length=0.1482744
        tendon_slack_length=0.05020839 pennation_angle_at_optimal=0.2073076 ignore_tendon_compliance=true
      PathPoint P1: pelvis (-0.0502671 -0.118865 0.0309836)
      PathPoint P2: femur_r (0.00206297 -0.174792 0.0249091)
      PathWrap: wrap_object=AMmid_at_femshaft_r method=hybrid
    Millard2012EquilibriumMuscle addmagProx_r: max_isometric_force=597.2951 optimal_fiber_length=0.1074631
        tendon_slack_length=0.04103555 pennation_angle_at_optimal=0.3114833 ignore_tendon_compliance=true
      PathPoint P1: pelvis (-0.0295722 -0.105871 0.0148187)
      PathPoint P2: femur_r (-0.0130172 -0.0848775 0.027296)
      PathWrap: wrap_object=AMprox_at_femshaft_r method=hybrid
    Millard2012EquilibriumMuscle bflh140_r: max_isometric_force=1313.184 optimal_fiber_length=0.1038271
        tendon_slack_length=0.3537144 pennation_angle_at_optimal=0.1759182
      PathPoint bflh_r-P1: pelvis (-0.0992741 -0.117241 0.0636174)
      PathPoint bflh_r-P2: tibia_r (-0.0327556 -0.0327643 0.0344907)
      PathPoint bflh_r-P3: tibia_r (-0.0257774 -0.044979 0.033137)
    Millard2012EquilibriumMuscle bfsh140_r: max_isometric_force=557.1148 optimal_fiber_length=0.1159877
        tendon_slack_length=0.1112738 pennation_angle_at_optimal=0.2642232 ignore_tendon_compliance=true
      PathPoint bfsh_r-P1: femur_r (0.00426234 -0.227208 0.0199477)
      PathPoint bfsh_r-P2: tibia_r (-0.0273218 -0.029495 0.030544)
      PathWrap: wrap_object=BF140_at_gastroc_r method=hybrid
    Millard2012EquilibriumMuscle edl_r: max_isometric_force=603.4982 optimal_fiber_length=0.06761144
        tendon_slack_length=0.3598872 pennation_angle_at_optimal=0.2182582
      PathPoint P1: tibia_r (-0.0152529 -0.103915 0.0195428)
      PathPoint P2: tibia_r (0.0156342 -0.337702 0.010677)
      PathPoint P3: calcn_r (0.0940983 0.0573145 0.00104734)
      PathPoint P4: calcn_r (0.165466 0.00875639 0.0170192)
      PathPoint P5: toes_r (0.000307176 0.00748273 0.0200303)
      PathPoint P6: toes_r (0.0453597 -0.000636828 0.0327293)
    Millard2012EquilibriumMuscle ehl_r: max_isometric_force=285.8675 optimal_fiber_length=0.07335602
        tendon_slack_length=0.3204867 pennation_angle_at_optimal=0.1972681
      PathPoint P1: tibia_r (-0.0133463 -0.139212 0.0180175)
      PathPoint P2: tibia_r (0.00676848 -0.26127 0.0156342)
      PathPoint P3: tibia_r (0.0190661 -0.331684 -0.00266926)
      PathPoint P4: calcn_r (0.0993203 0.0619315 -0.0276235)
      PathPoint P5: calcn_r (0.132393 0.049195 -0.0336457)
      PathPoint P6: calcn_r (0.177548 0.0221298 -0.0366568)
      PathPoint P7: toes_r (0.0305128 0.00652749 -0.0320747)
      PathPoint P8: toes_r (0.0576467 0.00541304 -0.0243506)
    Millard2012EquilibriumMuscle fdl_r: max_isometric_force=423.177 optimal_fiber_length=0.04507332
        tendon_slack_length=0.3827926 pennation_angle_at_optimal=0.2248391
      PathPoint P1: tibia_r (-0.00219261 -0.16454 -0.00171595)
      PathPoint P2: tibia_r (-0.0167782 -0.327373 -0.011821)
      PathPoint P3: calcn_r (0.044643 0.0501502 -0.0366568)
      PathPoint P4: calcn_r (0.0724936 0.0280204 -0.0344312)
      PathPoint P5: calcn_r (0.169766 -0.0128958 0.0151864)
      PathPoint P6: toes_r (-0.00194545 -0.0124181 0.0192448)
      PathPoint P7: toes_r (0.0291817 -0.0113037 0.0281472)
      PathPoint P8: toes_r (0.0451549 -0.00955242 0.0316819)
    Millard2012EquilibriumMuscle fhl_r: max_isometric_force=907.8393 optimal_fiber_length=0.05305326
        tendon_slack_length=0.3567149 pennation_angle_at_optimal=0.2580255
      PathPoint P1: tibia_r (-0.0295525 -0.194268 0.0190661)
      PathPoint P2: tibia_r (-0.02307 -0.329708 -0.00724513)
      PathPoint P3: calcn_r (0.0382946 0.0439411 -0.031551)
      PathPoint P4: calcn_r (0.106283 0.0108261 -0.0335148)
      PathPoint P5: calcn_r (0.176729 -0.00843797 -0.0352167)
      PathPoint P6: toes_r (0.0158708 -0.0101892 -0.034693)
      PathPoint P7: toes_r (0.0575444 -0.0162391 -0.023696)
    Millard2012EquilibriumMuscle gaslat140_r: max_isometric_force=1575.059 optimal_fiber_length=0.06380042
        tendon_slack_length=0.3458168 pennation_angle_at_optimal=0.2102268
      PathPoint gaslat_r-P1: femur_r (0.00170494 -0.410073 0.0175523)
      PathPoint gaslat_r-P2: calcn_r (0.00450525 0.0493542 -0.00693861)
      PathWrap pathwrap_shank_r: wrap_object=GasLat_at_shank_r method=hybrid
      PathWrap pathwrap_condyles_r: wrap_object=GasLat_at_condyles_r method=hybrid
    Millard2012EquilibriumMuscle gasmed_r: max_isometric_force=3115.515 optimal_fiber_length=0.05434146
        tendon_slack_length=0.3564432 pennation_angle_at_optimal=0.1656816
      PathPoint P1: femur_r (0.00511481 -0.414378 -0.0187543)
      PathPoint P2: calcn_r (0.00450525 0.0493542 -0.00693861)
      PathWrap pathwrap_shank_r: wrap_object=GasMed_at_shank_r method=hybrid
      PathWrap pathwrap_condyles_r: wrap_object=GasMed_at_condyles_r method=hybrid
    Millard2012EquilibriumMuscle glmax1_r: max_isometric_force=983.7836 optimal_fiber_length=0.1470298
        tendon_slack_length=0.08731767 pennation_angle_at_optimal=0.3540118 ignore_tendon_compliance=true
      PathPoint P1: pelvis (-0.117506 0.0339615 0.0611205)
      PathPoint P2: pelvis (-0.119988 -0.0238223 0.0845699)
      PathPoint P3: femur_r (-0.0378496 -0.0350876 0.0257445)
      PathPoint P4: femur_r (-0.0236134 -0.060919 0.040066)
      PathWrap: wrap_object=Gmax1_at_pelvis_r method=hybrid
    Millard2012EquilibriumMuscle glmax2_r: max_isometric_force=1406.046 optimal_fiber_length=0.1601292
        tendon_slack_length=0.1111725 pennation_angle_at_optimal=0.3673821 ignore_tendon_compliance=true
      PathPoint P1: pelvis (-0.125715 0.00856421 0.0501557)
      PathPoint P2: pelvis (-0.128293 -0.0599495 0.088261)
      PathPoint P3: femur_r (-0.038361 -0.0628563 0.0214822)
      PathPoint P4: femur_r (-0.0132985 -0.109353 0.0357184)
      PathWrap: wrap_object=Gmax2_at_pelvis_r method=hybrid
    Millard2012EquilibriumMuscle glmax3_r: max_isometric_force=947.7541 optimal_fiber_length=0.1711918
        tendon_slack_length=0.1055853 pennation_angle_at_optimal=0.3824161 ignore_tendon_compliance=true
      PathPoint P1: pelvis (-0.124093 -0.0516806 0.00977059)
      PathPoint P2: pelvis (-0.121515 -0.124329 0.0472245)
      PathPoint P3: femur_r (-0.0239543 -0.121084 0.0080132)
      PathPoint P4: femur_r (-0.00511481 -0.152728 0.0350364)
      PathWrap: wrap_object=Gmax3_at_pelvis_r method=hybrid
    Millard2012EquilibriumMuscle glmed1_r: max_isometric_force=1093.467 optimal_fiber_length=0.07140491
        tendon_slack_length=0.0545972 pennation_angle_at_optimal=0.3165559 ignore_tendon_compliance=true
      PathPoint P1: pelvis (-0.0424779 0.0241176 0.127235)
      PathPoint P2: femur_r (-0.0185838 -0.0125928 0.047312)
    Millard2012EquilibriumMuscle glmed2_r: max_isometric_force=765.0917 optimal_fiber_length=0.07066432
        tendon_slack_length=0.06316114 pennation_angle_at_optimal=0.3165559 ignore_tendon_compliance=true
      PathPoint P1: pelvis (-0.0811375 0.0311068 0.0732794)
      PathPoint P2: femur_r (-0.0219937 -0.00624258 0.044925)
    Millard2012EquilibriumMuscle glmed3_r: max_isometric_force=871.1993 optimal_fiber_length=0.07054362
        tendon_slack_length=0.0437108 pennation_angle_at_optimal=0.3165559 ignore_tendon_compliance=true
      PathPoint P1: pelvis (-0.109965 -0.00718606 0.0571037)
      PathPoint P2: femur_r (-0.0263412 -0.00505864 0.0441578)
    Millard2012EquilibriumMuscle glmin1_r: max_isometric_force=374.0459 optimal_fiber_length=0.06494164
        tendon_slack_length=0.01541197 pennation_angle_at_optimal=0.1745329 ignore_tendon_compliance=true
      PathPoint P1: pelvis (-0.0442915 -0.0146674 0.113122)
      PathPoint P2: femur_r (-0.00613777 -0.0111936 0.0477382)
    Millard2012EquilibriumMuscle glmin2_r: max_isometric_force=394.8197 optimal_fiber_length=0.05325155
        tendon_slack_length=0.02481812 pennation_angle_at_optimal=0 ignore_tendon_compliance=true
      PathPoint P1: pelvis (-0.0588008 -0.0139784 0.105414)
      PathPoint P2: femur_r (-0.00818369 -0.0111936 0.0477382)
    Millard2012EquilibriumMuscle glmin3_r: max_isometric_force=446.7738 optimal_fiber_length=0.0359379
        tendon_slack_length=0.04811187 pennation_angle_at_optimal=0.01745329
      PathPoint P1: pelvis (-0.0753147 -0.0152581 0.0866326)
      PathPoint P2: femur_r (-0.0115083 -0.00893334 0.0468857)
    Millard2012EquilibriumMuscle grac_r: max_isometric_force=281.3115 optimal_fiber_length=0.2406375
        tendon_slack_length=0.1817075 pennation_angle_at_optimal=0.1720016 ignore_tendon_compliance=true
      PathPoint P1: pelvis (-0.0452079 -0.127302 0.0266629)
      PathPoint P2: tibia_r (-0.0175599 -0.0427067 -0.0282274)
      PathPoint P3: tibia_r (0.00169689 -0.0625287 -0.0149955)
      PathWrap: wrap_object=GR_at_condyles_r method=hybrid
    Millard2012EquilibriumMuscle iliacus_r: max_isometric_force=1021.141 optimal_fiber_length=0.1060787
        tendon_slack_length=0.09565061 pennation_angle_at_optimal=0.279914 ignore_tendon_compliance=true
      PathPoint P1: pelvis (-0.0577508 0.0304177 0.0915179)
      PathPoint P2: pelvis (-0.0128865 -0.0548306 0.082073)
      PathPoint P3: femur_r (-0.00196068 -0.0608113 0.0118493)
      PathPoint P4: femur_r (-0.0104001 -0.0685607 0.0167084)
      PathWrap: wrap_object=IL_at_brim_r method=hybrid range=(2 3)
    Millard2012EquilibriumMuscle perbrev_r: max_isometric_force=521.2016 optimal_fiber_length=0.04488215
        tendon_slack_length=0.1458448 pennation_angle_at_optimal=0.2052361
      PathPoint P1: tibia_r (-0.0231654 -0.22741 0.023928)
      PathPoint P2: tibia_r (-0.0323171 -0.349647 0.0237373)
      PathPoint P3: tibia_r (-0.0271693 -0.359616 0.0243093)
      PathPoint P4: calcn_r (0.0482267 0.0429859 0.0305037)
      PathPoint P5: calcn_r (0.0693194 0.0348663 0.0449046)
    Millard2012EquilibriumMuscle perlong_r: max_isometric_force=1115.371 optimal_fiber_length=0.05111456
        tendon_slack_length=0.3342779 pennation_angle_at_optimal=0.2479525
      PathPoint P1: tibia_r (-0.0190661 -0.123315 0.0268833)
      PathPoint P2: tibia_r (-0.0302198 -0.350276 0.0225934)
      PathPoint P3: tibia_r (-0.02593 -0.360515 0.0228794)
      PathPoint P4: calcn_r (0.0448477 0.0366176 0.0289327)
      PathPoint P5: calcn_r (0.069729 0.0168759 0.0371805)
      PathPoint P6: calcn_r (0.0872381 0.0109853 0.0154482)
      PathPoint P7: calcn_r (0.123178 0.0135326 -0.0240888)
    Millard2012EquilibriumMuscle piri_r: max_isometric_force=1029.787 optimal_fiber_length=0.02595096
        tendon_slack_length=0.1146895 pennation_angle_at_optimal=0.1745329
      PathPoint P1: pelvis (-0.0971836 -0.00642808 0.0146667)
      PathPoint P2: pelvis (-0.0973841 -0.0301815 0.066136)
      PathPoint P3: femur_r (-0.0126165 -0.0038747 0.0372528)
    Millard2012EquilibriumMuscle psoas_r: max_isometric_force=1426.79 optimal_fiber_length=0.1155306
        tendon_slack_length=0.09837709 pennation_angle_at_optimal=0.2155251 ignore_tendon_compliance=true
      PathPoint P1: pelvis (-0.0578462 0.0610323 0.0423392)
      PathPoint P2: pelvis (-0.0195685 -0.0643792 0.0712167)
      PathPoint P3: femur_r (-0.0112526 -0.0502635 0.00392135)
      PathPoint P4: femur_r (-0.020033 -0.0563985 0.00750171)
      PathWrap: wrap_object=PS_at_brim_r method=hybrid range=(2 3)
    Millard2012EquilibriumMuscle recfem_r: max_isometric_force=2191.741 optimal_fiber_length=0.07927848
        tendon_slack_length=0.4704483 pennation_angle_at_optimal=0.2170149
      PathPoint P1: pelvis (-0.0229094 -0.0381944 0.101288)
      PathPoint P2: patella_r (0.00852468 0.052739 0.000596727)
      PathPoint P3: patella_r (0.0103149 0.0470346 -0.000852468)
      PathPoint P4: patella_r (0.00426234 0.00265848 2.5574e-5)
      PathPoint P5: tibia_r (0.0310778 -0.0566908 -0.000448054)
      PathWrap: wrap_object=KnExt_at_fem_r method=hybrid
    Millard2012EquilibriumMuscle sart_r: max_isometric_force=249.4131 optimal_fiber_length=0.4170226
        tendon_slack_length=0.1283145 pennation_angle_at_optimal=0.02613542 ignore_tendon_compliance=true
      PathPoint P1: pelvis (-0.0186139 -0.0153565 0.114642)
      PathPoint P2: femur_r (-0.0025574 -0.384026 -0.0358889)
      PathPoint P3: tibia_r (-0.023928 -0.0360155 -0.0347957)
      PathPoint P4: tibia_r (-0.0151576 -0.0537988 -0.0251673)
      PathPoint P5: tibia_r (0.012965 -0.0727496 -0.0024786)
    Millard2012EquilibriumMuscle semimem_r: max_isometric_force=2200.987 optimal_fiber_length=0.09174657
        tendon_slack_length=0.3573849 pennation_angle_at_optimal=0.2545615
      PathPoint P1: pelvis (-0.0942149 -0.112221 0.0666571)
      PathPoint P2: tibia_r (-0.0257393 -0.0368239 -0.0186848)
      PathWrap: wrap_object=SM_at_condyles_r method=hybrid
    Millard2012EquilibriumMuscle semiten_r: max_isometric_force=591.2951 optimal_fiber_length=0.2031171
        tendon_slack_length=0.2601572 pennation_angle_at_optimal=0.241295
      PathPoint P1: pelvis (-0.0990832 -0.123344 0.0559095)
      PathPoint P2: tibia_r (-0.0297432 -0.0456257 -0.0218307)
      PathPoint P3: tibia_r (0.00181128 -0.0694265 -0.0111537)
      PathWrap: wrap_object=ST_at_condyles_r method=hybrid
    Millard2012EquilibriumMuscle soleus_r: max_isometric_force=6194.843 optimal_fiber_length=0.04065875
        tendon_slack_length=0.259985 pennation_angle_at_optimal=0.3814289
      PathPoint P1: tibia_r (-0.00724513 -0.0822699 0.00934241)
      PathPoint P2: calcn_r (0.00450525 0.0493542 -0.00693861)
    Millard2012EquilibriumMuscle tfl_r: max_isometric_force=411.2066 optimal_fiber_length=0.09937905
        tendon_slack_length=0.4702167 pennation_angle_at_optimal=0.05235988
      PathPoint P1: pelvis (-0.0296868 0.021066 0.134726)
      PathPoint P2: femur_r (0.0250625 -0.107093 0.0508923)
      PathPoint P3: femur_r (0.0091214 -0.435904 0.02762)
      PathPoint P4: tibia_r (0.0102957 -0.0368239 0.0329844)
    Millard2012EquilibriumMuscle tibant_r: max_isometric_force=1227.452 optimal_fiber_length=0.06568091
        tendon_slack_length=0.2312401 pennation_angle_at_optimal=0.1951828
      PathPoint P1: tibia_r (0.0146809 -0.117836 0.0154436)
      PathPoint P2: tibia_r (0.023928 -0.171186 0.0122023)
      PathPoint P3: tibia_r (0.0222121 -0.328631 -0.0125837)
      PathPoint P4: calcn_r (0.119389 0.0283388 -0.0399297)
    Millard2012EquilibriumMuscle tibpost_r: max_isometric_force=1730.154 optimal_fiber_length=0.03601892
        tendon_slack_length=0.2675497 pennation_angle_at_optimal=0.2264891
      PathPoint P1: tibia_r (-0.00390856 -0.117118 0.00981906)
      PathPoint P2: tibia_r (-0.0156342 -0.328271 -0.0166829)
      PathPoint P3: calcn_r (0.0426975 0.0531751 -0.0374423)
      PathPoint P4: calcn_r (0.0790467 0.0253139 -0.0367877)
    Millard2012EquilibriumMuscle vasint_r: max_isometric_force=1697.361 optimal_fiber_length=0.1203402
        tendon_slack_length=0.2108525 pennation_angle_at_optimal=0.06309973
      PathPoint P1: femur_r (0.0247216 -0.207081 0.0264265)
      PathPoint P2: femur_r (0.0285577 -0.224302 0.0242953)
      PathPoint P3: patella_r (0.00494431 0.0516627 -0.000511481)
      PathPoint P4: patella_r (0.00426234 0.00265848 -0.000332462)
      PathPoint P5: tibia_r (0.0310492 -0.0567626 0.000409922)
      PathWrap: wrap_object=KnExt_at_fem_r method=hybrid
    Millard2012EquilibriumMuscle vaslat140_r: max_isometric_force=5148.767 optimal_fiber_length=0.1195853
        tendon_slack_length=0.2258833 pennation_angle_at_optimal=0.2528673
      PathPoint vaslat_r-P1: femur_r (0.00409184 -0.199547 0.0297511)
      PathPoint vaslat_r-P2: femur_r (0.0229314 -0.278871 0.0348659)
      PathPoint vaslat_r-P3: patella_r (0.00878042 0.0455278 0.0120198)
      PathPoint vaslat_r-P4: patella_r (0.00426234 0.00265848 0.00624859)
      PathPoint vaslat_r-P5: tibia_r (0.0310206 -0.0569243 0.0048714)
      PathWrap: wrap_object=KnExtVL_at_fem_r method=hybrid
    Millard2012EquilibriumMuscle vasmed_r: max_isometric_force=2747.823 optimal_fiber_length=0.1120496
        tendon_slack_length=0.2118756 pennation_angle_at_optimal=0.4222225
      PathPoint P1: femur_r (0.0119345 -0.225917 0.0160264)
      PathPoint P2: femur_r (0.0303478 -0.298029 0.000767221)
      PathPoint P3: patella_r (0.00537055 0.0478956 -0.0144919)
      PathPoint P4: patella_r (0.00426234 0.00265848 -0.00724597)
      PathPoint P5: tibia_r (0.0304105 -0.0570949 -0.00646342)
      PathWrap: wrap_object=KnExt_at_fem_r method=hybrid
    Millard2012EquilibriumMuscle addbrev_l: max_isometric_force=625.8197 optimal_fiber_length=0.1098609
        tendon_slack_length=0.03777499 pennation_angle_at_optimal=0.1147809 ignore_tendon_compliance=true
      PathPoint P1: pelvis (-0.0182321 -0.0925329 -0.0167186)
      PathPoint P2: femur_l (-0.00165814 -0.130008 -0.0206439)
      PathWrap: wrap_object=AB_at_femshaft_l method=hybrid
    Millard2012EquilibriumMuscle addlong_l: max_isometric_force=916.8 optimal_fiber_length=0.1187157
        tendon_slack_length=0.1446087 pennation_angle_at_optimal=0.1377704
      PathPoint P1: pelvis (-0.00723555 -0.0875125 -0.0204965)
      PathPoint P2: femur_l (0.00933534 -0.263729 -0.0131242)
      PathWrap: wrap_object=AL_at_femshaft_l method=hybrid
    Millard2012EquilibriumMuscle addmagDist_l: max_isometric_force=597.2951 optimal_fiber_length=0.1980331
        tendon_slack_length=0.09765391 pennation_angle_at_optimal=0.194705 ignore_tendon_compliance=true
      PathPoint P1: pelvis (-0.0706755 -0.125677 -0.0432294)
      PathPoint P2: femur_l (0.00932704 -0.289212 -0.0160011)
      PathWrap: wrap_object=AMdist_at_femshaft_l method=hybrid
    Millard2012EquilibriumMuscle addmagIsch_l: max_isometric_force=597.2951 optimal_fiber_length=0.1746103
        tendon_slack_length=0.241842 pennation_angle_at_optimal=0.1680443
      PathPoint P1: pelvis (-0.0855475 -0.127735 -0.0452813)
      PathPoint P2: femur_l (0.00398783 -0.42745 0.0271355)
      PathWrap: wrap_object=AMisch_at_condyles_l method=hybrid
    Millard2012EquilibriumMuscle addmagMid_l: max_isometric_force=597.2951 optimal_fiber_length=0.1513922
        tendon_slack_length=0.05126413 pennation_angle_at_optimal=0.2073076 ignore_tendon_compliance=true
      PathPoint P1: pelvis (-0.0502671 -0.118865 -0.0309836)
      PathPoint P2: femur_l (0.00200635 -0.178926 -0.0242254)
      PathWrap: wrap_object=AMmid_at_femshaft_l method=hybrid
    Millard2012EquilibriumMuscle addmagProx_l: max_isometric_force=597.2951 optimal_fiber_length=0.1076679
        tendon_slack_length=0.04111374 pennation_angle_at_optimal=0.3114833 ignore_tendon_compliance=true
      PathPoint P1: pelvis (-0.0295722 -0.105871 -0.0148187)
      PathPoint P2: femur_l (-0.0126599 -0.0868849 -0.0265468)
      PathWrap: wrap_object=AMprox_at_femshaft_l method=hybrid
    Millard2012EquilibriumMuscle bflh140_l: max_isometric_force=1313.184 optimal_fiber_length=0.1061244
        tendon_slack_length=0.3615407 pennation_angle_at_optimal=0.1759182
      PathPoint bflh_l-P1: pelvis (-0.0992741 -0.117241 -0.0636174)
      PathPoint bflh_l-P2: tibia_l (-0.032484 -0.0324625 -0.0342046)
      PathPoint bflh_l-P3: tibia_l (-0.0255637 -0.0445647 -0.0328622)
    Millard2012EquilibriumMuscle bfsh140_l: max_isometric_force=557.1148 optimal_fiber_length=0.1182643
        tendon_slack_length=0.1134579 pennation_angle_at_optimal=0.2642232 ignore_tendon_compliance=true
      PathPoint bfsh_l-P1: femur_l (0.00414535 -0.232582 -0.0194003)
      PathPoint bfsh_l-P2: tibia_l (-0.0270952 -0.0292234 -0.0302907)
      PathWrap: wrap_object=BF140_at_gastroc_l method=hybrid
    Millard2012EquilibriumMuscle edl_l: max_isometric_force=603.4982 optimal_fiber_length=0.06782284
        tendon_slack_length=0.3610125 pennation_angle_at_optimal=0.2182582
      PathPoint P1: tibia_l (-0.0151264 -0.102958 -0.0193807)
      PathPoint P2: tibia_l (0.0155046 -0.334591 -0.0105885)
      PathPoint P3: calcn_l (0.0960193 0.0577003 -0.00110426)
      PathPoint P4: calcn_l (0.168843 0.00881532 -0.0179442)
      PathPoint P5: toes_l (0.000313447 0.00753309 -0.021119)
      PathPoint P6: toes_l (0.0462857 -0.000641114 -0.0345081)
    Millard2012EquilibriumMuscle ehl_l: max_isometric_force=285.8675 optimal_fiber_length=0.0737273
        tendon_slack_length=0.3221087 pennation_angle_at_optimal=0.1972681
      PathPoint P1: tibia_l (-0.0132356 -0.13793 -0.0178681)
      PathPoint P2: tibia_l (0.00671236 -0.258863 -0.0155046)
      PathPoint P3: tibia_l (0.018908 -0.328629 0.00264713)
      PathPoint P4: calcn_l (0.101348 0.0623484 0.0291248)
      PathPoint P5: calcn_l (0.135096 0.0495261 0.0354743)
      PathPoint P6: calcn_l (0.181172 0.0222787 0.0386491)
      PathPoint P7: toes_l (0.0311357 0.00657142 0.033818)
      PathPoint P8: toes_l (0.0588235 0.00544947 0.025674)
    Millard2012EquilibriumMuscle fdl_l: max_isometric_force=423.177 optimal_fiber_length=0.04545932
        tendon_slack_length=0.3860708 pennation_angle_at_optimal=0.2248391
      PathPoint P1: tibia_l (-0.00217442 -0.163024 0.00170172)
      PathPoint P2: tibia_l (-0.0166391 -0.324358 0.011723)
      PathPoint P3: calcn_l (0.0455543 0.0504878 0.0386491)
      PathPoint P4: calcn_l (0.0739735 0.028209 0.0363025)
      PathPoint P5: calcn_l (0.173232 -0.0129826 -0.0160118)
      PathPoint P6: toes_l (-0.00198516 -0.0125017 -0.0202908)
      PathPoint P7: toes_l (0.0297775 -0.0113798 -0.029677)
      PathPoint P8: toes_l (0.0460767 -0.00961672 -0.0334039)
    Millard2012EquilibriumMuscle fhl_l: max_isometric_force=907.8393 optimal_fiber_length=0.0534614
        tendon_slack_length=0.3594591 pennation_angle_at_optimal=0.2580255
      PathPoint P1: tibia_l (-0.0293075 -0.192479 -0.018908)
      PathPoint P2: tibia_l (-0.0228787 -0.326672 0.00718506)
      PathPoint P3: calcn_l (0.0390764 0.0442369 0.0332658)
      PathPoint P4: calcn_l (0.108453 0.0108989 0.0353363)
      PathPoint P5: calcn_l (0.180336 -0.00849477 0.0371307)
      PathPoint P6: toes_l (0.0161948 -0.0102578 0.0365786)
      PathPoint P7: toes_l (0.0587191 -0.0163484 0.0249839)
    Millard2012EquilibriumMuscle gaslat140_l: max_isometric_force=1575.059 optimal_fiber_length=0.06337094
        tendon_slack_length=0.3434888 pennation_angle_at_optimal=0.2102268
      PathPoint gaslat_l-P1: femur_l (0.00165814 -0.419771 -0.0170706)
      PathPoint gaslat_l-P2: calcn_l (0.00459722 0.0496864 0.00731572)
      PathWrap pathwrap_shank_l: wrap_object=GasLat_at_shank_l method=hybrid
      PathWrap pathwrap_condyles_l: wrap_object=GasLat_at_condyles_l method=hybrid
    Millard2012EquilibriumMuscle gasmed_l: max_isometric_force=3115.515 optimal_fiber_length=0.0539286
        tendon_slack_length=0.3537351 pennation_angle_at_optimal=0.1656816
      PathPoint P1: femur_l (0.00497442 -0.424178 0.0182396)
      PathPoint P2: calcn_l (0.00459722 0.0496864 0.00731572)
      PathWrap pathwrap_shank_l: wrap_object=GasMed_at_shank_l method=hybrid
      PathWrap pathwrap_condyles_l: wrap_object=GasMed_at_condyles_l method=hybrid
    Millard2012EquilibriumMuscle glmax1_l: max_isometric_force=983.7836 optimal_fiber_length=0.1478311
        tendon_slack_length=0.08779356 pennation_angle_at_optimal=0.3540118 ignore_tendon_compliance=true
      PathPoint P1: pelvis (-0.117506 0.0339615 -0.0611205)
      PathPoint P2: pelvis (-0.119988 -0.0238223 -0.0845699)
      PathPoint P3: femur_l (-0.0368107 -0.0359174 -0.0250379)
      PathPoint P4: femur_l (-0.0229653 -0.0623597 -0.0389663)
      PathWrap: wrap_object=Gmax1_at_pelvis_l method=hybrid
    Millard2012EquilibriumMuscle glmax2_l: max_isometric_force=1406.046 optimal_fiber_length=0.1616964
        tendon_slack_length=0.1122606 pennation_angle_at_optimal=0.3673821 ignore_tendon_compliance=true
      PathPoint P1: pelvis (-0.125715 0.00856421 -0.0501557)
      PathPoint P2: pelvis (-0.128293 -0.0599495 -0.088261)
      PathPoint P3: femur_l (-0.0373082 -0.0643429 -0.0208926)
      PathPoint P4: femur_l (-0.0129335 -0.111939 -0.0347381)
      PathWrap: wrap_object=Gmax2_at_pelvis_l method=hybrid
    Millard2012EquilibriumMuscle glmax3_l: max_isometric_force=947.7541 optimal_fiber_length=0.1729307
        tendon_slack_length=0.1066578 pennation_angle_at_optimal=0.3824161 ignore_tendon_compliance=true
      PathPoint P1: pelvis (-0.124093 -0.0516806 -0.00977059)
      PathPoint P2: pelvis (-0.121515 -0.124329 -0.0472245)
      PathPoint P3: femur_l (-0.0232969 -0.123948 -0.00779326)
      PathPoint P4: femur_l (-0.00497442 -0.15634 -0.0340748)
      PathWrap: wrap_object=Gmax3_at_pelvis_l method=hybrid
    Millard2012EquilibriumMuscle glmed1_l: max_isometric_force=1093.467 optimal_fiber_length=0.07147998
        tendon_slack_length=0.0546546 pennation_angle_at_optimal=0.3165559 ignore_tendon_compliance=true
      PathPoint P1: pelvis (-0.0424779 0.0241176 -0.127235)
      PathPoint P2: femur_l (-0.0180737 -0.0128906 -0.0460134)
    Millard2012EquilibriumMuscle glmed2_l: max_isometric_force=765.0917 optimal_fiber_length=0.07045828
        tendon_slack_length=0.06297697 pennation_angle_at_optimal=0.3165559 ignore_tendon_compliance=true
      PathPoint P1: pelvis (-0.0811375 0.0311068 -0.0732794)
      PathPoint P2: femur_l (-0.02139 -0.00639022 -0.043692)
    Millard2012EquilibriumMuscle glmed3_l: max_isometric_force=871.1993 optimal_fiber_length=0.07021148
        tendon_slack_length=0.043505 pennation_angle_at_optimal=0.3165559 ignore_tendon_compliance=true
      PathPoint P1: pelvis (-0.109965 -0.00718606 -0.0571037)
      PathPoint P2: femur_l (-0.0256183 -0.00517828 -0.0429459)
    Millard2012EquilibriumMuscle glmin1_l: max_isometric_force=374.0459 optimal_fiber_length=0.06487258
        tendon_slack_length=0.01539558 pennation_angle_at_optimal=0.1745329 ignore_tendon_compliance=true
      PathPoint P1: pelvis (-0.0442915 -0.0146674 -0.113122)
      PathPoint P2: femur_l (-0.00596931 -0.0114583 -0.046428)
    Millard2012EquilibriumMuscle glmin2_l: max_isometric_force=394.8197 optimal_fiber_length=0.05312868
        tendon_slack_length=0.02476086 pennation_angle_at_optimal=0 ignore_tendon_compliance=true
      PathPoint P1: pelvis (-0.0588008 -0.0139784 -0.105414)
      PathPoint P2: femur_l (-0.00795908 -0.0114583 -0.046428)
    Millard2012EquilibriumMuscle glmin3_l: max_isometric_force=446.7738 optimal_fiber_length=0.03574601
        tendon_slack_length=0.04785497 pennation_angle_at_optimal=0.01745329
      PathPoint P1: pelvis (-0.0753147 -0.0152581 -0.0866326)
      PathPoint P2: femur_l (-0.0111925 -0.00914462 -0.0455989)
    Millard2012EquilibriumMuscle grac_l: max_isometric_force=281.3115 optimal_fiber_length=0.2456771
        tendon_slack_length=0.185513 pennation_angle_at_optimal=0.1720016 ignore_tendon_compliance=true
      PathPoint P1: pelvis (-0.0452079 -0.127302 -0.0266629)
      PathPoint P2: tibia_l (-0.0174143 -0.0423134 0.0279934)
      PathPoint P3: tibia_l (0.00168282 -0.0619528 0.0148712)
      PathWrap: wrap_object=GR_at_condyles_l method=hybrid
    Millard2012EquilibriumMuscle iliacus_l: max_isometric_force=1021.141 optimal_fiber_length=0.1065943
        tendon_slack_length=0.09611553 pennation_angle_at_optimal=0.279914 ignore_tendon_compliance=true
      PathPoint P1: pelvis (-0.0577508 0.0304177 -0.0915179)
      PathPoint P2: pelvis (-0.0128865 -0.0548306 -0.082073)
      PathPoint P3: femur_l (-0.00190686 -0.0622495 -0.0115241)
      PathPoint P4: femur_l (-0.0101147 -0.0701822 -0.0162498)
      PathWrap: wrap_object=IL_at_brim_l method=hybrid range=(2 3)
    Millard2012EquilibriumMuscle perbrev_l: max_isometric_force=521.2016 optimal_fiber_length=0.04508296
        tendon_slack_length=0.1464973 pennation_angle_at_optimal=0.2052361
      PathPoint P1: tibia_l (-0.0229733 -0.225315 -0.0237296)
      PathPoint P2: tibia_l (-0.0320491 -0.346427 -0.0235405)
      PathPoint P3: tibia_l (-0.026944 -0.356304 -0.0241078)
      PathPoint P4: calcn_l (0.0492112 0.0432752 -0.0321616)
      PathPoint P5: calcn_l (0.0707345 0.035101 -0.0473451)
    Millard2012EquilibriumMuscle perlong_l: max_isometric_force=1115.371 optimal_fiber_length=0.05148984
        tendon_slack_length=0.3367322 pennation_angle_at_optimal=0.2479525
      PathPoint P1: tibia_l (-0.018908 -0.122179 -0.0266603)
      PathPoint P2: tibia_l (-0.0299692 -0.34705 -0.022406)
      PathPoint P3: tibia_l (-0.0257149 -0.357194 -0.0226897)
      PathPoint P4: calcn_l (0.0457633 0.0368641 -0.0305052)
      PathPoint P5: calcn_l (0.0711525 0.0169895 -0.0392012)
      PathPoint P6: calcn_l (0.0890189 0.0110592 -0.0162878)
      PathPoint P7: calcn_l (0.125692 0.0136237 0.025398)
    Millard2012EquilibriumMuscle piri_l: max_isometric_force=1029.787 optimal_fiber_length=0.02585736
        tendon_slack_length=0.1142759 pennation_angle_at_optimal=0.1745329
      PathPoint P1: pelvis (-0.0971836 -0.00642808 -0.0146667)
      PathPoint P2: pelvis (-0.0973841 -0.0301815 -0.066136)
      PathPoint P3: femur_l (-0.0122702 -0.00396634 -0.0362304)
    Millard2012EquilibriumMuscle psoas_l: max_isometric_force=1426.79 optimal_fiber_length=0.1158049
        tendon_slack_length=0.09861063 pennation_angle_at_optimal=0.2155251 ignore_tendon_compliance=true
      PathPoint P1: pelvis (-0.0578462 0.0610323 -0.0423392)
      PathPoint P2: pelvis (-0.0195685 -0.0643792 -0.0712167)
      PathPoint P3: femur_l (-0.0109437 -0.0514523 -0.00381372)
      PathPoint P4: femur_l (-0.0194832 -0.0577323 -0.00729582)
      PathWrap: wrap_object=PS_at_brim_l method=hybrid range=(2 3)
    Millard2012EquilibriumMuscle recfem_l: max_isometric_force=2191.741 optimal_fiber_length=0.08072295
        tendon_slack_length=0.47902 pennation_angle_at_optimal=0.2170149
      PathPoint P1: pelvis (-0.0229094 -0.0381944 -0.101288)
      PathPoint P2: patella_l (0.00852468 0.0539863 -0.000596727)
      PathPoint P3: patella_l (0.0103149 0.048147 0.000852468)
      PathPoint P4: patella_l (0.00426234 0.00272135 -2.5574e-5)
      PathPoint P5: tibia_l (0.0308201 -0.0561687 0.000444339)
      PathWrap: wrap_object=KnExt_at_fem_l method=hybrid
    Millard2012EquilibriumMuscle sart_l: max_isometric_force=249.4131 optimal_fiber_length=0.423381
        tendon_slack_length=0.1302709 pennation_angle_at_optimal=0.02613542 ignore_tendon_compliance=true
      PathPoint P1: pelvis (-0.0186139 -0.0153565 -0.114642)
      PathPoint P2: femur_l (-0.00248721 -0.393108 0.0349039)
      PathPoint P3: tibia_l (-0.0237296 -0.0356838 0.0345072)
      PathPoint P4: tibia_l (-0.0150319 -0.0533033 0.0249586)
      PathPoint P5: tibia_l (0.0128575 -0.0720796 0.00245805)
    Millard2012EquilibriumMuscle semimem_l: max_isometric_force=2200.987 optimal_fiber_length=0.09385078
        tendon_slack_length=0.3655815 pennation_angle_at_optimal=0.2545615
      PathPoint P1: pelvis (-0.0942149 -0.112221 -0.0666571)
      PathPoint P2: tibia_l (-0.0255259 -0.0364847 0.0185299)
      PathWrap: wrap_object=SM_at_condyles_l method=hybrid
    Millard2012EquilibriumMuscle semiten_l: max_isometric_force=591.2951 optimal_fiber_length=0.2072146
        tendon_slack_length=0.2654054 pennation_angle_at_optimal=0.241295
      PathPoint P1: pelvis (-0.0990832 -0.123344 -0.0559095)
      PathPoint P2: tibia_l (-0.0294965 -0.0452054 0.0216497)
      PathPoint P3: tibia_l (0.00179626 -0.068787 0.0110612)
      PathWrap: wrap_object=ST_at_condyles_l method=hybrid
    Millard2012EquilibriumMuscle soleus_l: max_isometric_force=6194.843 optimal_fiber_length=0.04035088
        tendon_slack_length=0.2580163 pennation_angle_at_optimal=0.3814289
      PathPoint P1: tibia_l (-0.00718506 -0.0815122 -0.00926494)
      PathPoint P2: calcn_l (0.00459722 0.0496864 0.00731572)
    Millard2012EquilibriumMuscle tfl_l: max_isometric_force=411.2066 optimal_fiber_length=0.1011307
        tendon_slack_length=0.4785048 pennation_angle_at_optimal=0.05235988
      PathPoint P1: pelvis (-0.0296868 0.021066 -0.134726)
      PathPoint P2: femur_l (0.0243747 -0.109625 -0.0494955)
      PathPoint P3: femur_l (0.00887106 -0.446213 -0.0268619)
      PathPoint P4: tibia_l (0.0102103 -0.0364847 -0.0327109)
    Millard2012EquilibriumMuscle tibant_l: max_isometric_force=1227.452 optimal_fiber_length=0.06550076
        tendon_slack_length=0.2306059 pennation_angle_at_optimal=0.1951828
      PathPoint P1: tibia_l (0.0145592 -0.116751 -0.0153155)
      PathPoint P2: tibia_l (0.0237296 -0.169609 -0.0121011)
      PathPoint P3: tibia_l (0.0220279 -0.325604 0.0124793)
      PathPoint P4: calcn_l (0.121826 0.0285296 0.0420999)
    Millard2012EquilibriumMuscle tibpost_l: max_isometric_force=1730.154 optimal_fiber_length=0.03589543
        tendon_slack_length=0.2666324 pennation_angle_at_optimal=0.2264891
      PathPoint P1: tibia_l (-0.00387615 -0.116039 -0.00973764)
      PathPoint P2: tibia_l (-0.0155046 -0.325248 0.0165445)
      PathPoint P3: calcn_l (0.0435691 0.0535331 0.0394773)
      PathPoint P4: calcn_l (0.0806604 0.0254843 0.0387871)
    Millard2012EquilibriumMuscle vasint_l: max_isometric_force=1697.361 optimal_fiber_length=0.1222939
        tendon_slack_length=0.2142757 pennation_angle_at_optimal=0.06309973
      PathPoint P1: femur_l (0.024043 -0.211979 -0.0257012)
      PathPoint P2: femur_l (0.0277739 -0.229607 -0.0236285)
      PathPoint P3: patella_l (0.00494431 0.0528846 0.000511481)
      PathPoint P4: patella_l (0.00426234 0.00272135 0.000332462)
      PathPoint P5: tibia_l (0.0307917 -0.0562398 -0.000406523)
      PathWrap: wrap_object=KnExt_at_fem_l method=hybrid
    Millard2012EquilibriumMuscle vaslat140_l: max_isometric_force=5148.767 optimal_fiber_length=0.1213957
        tendon_slack_length=0.2293031 pennation_angle_at_optimal=0.2528673
      PathPoint vaslat_l-P1: femur_l (0.00397954 -0.204267 -0.0289346)
      PathPoint vaslat_l-P2: femur_l (0.022302 -0.285466 -0.033909)
      PathPoint vaslat_l-P3: patella_l (0.00878042 0.0466045 -0.0120198)
      PathPoint vaslat_l-P4: patella_l (0.00426234 0.00272135 -0.00624859)
      PathPoint vaslat_l-P5: tibia_l (0.0307634 -0.0564 -0.004831)
      PathWrap: wrap_object=KnExtVL_at_fem_l method=hybrid
    Millard2012EquilibriumMuscle vasmed_l: max_isometric_force=2747.823 optimal_fiber_length=0.1137152
        tendon_slack_length=0.2150251 pennation_angle_at_optimal=0.4222225
      PathPoint P1: femur_l (0.011607 -0.23126 -0.0155865)
      PathPoint P2: femur_l (0.0295149 -0.305078 -0.000746164)
      PathPoint P3: patella_l (0.00537055 0.0490284 0.0144919)
      PathPoint P4: patella_l (0.00426234 0.00272135 0.00724597)
      PathPoint P5: tibia_l (0.0301583 -0.0565691 0.00640983)
      PathWrap: wrap_object=KnExt_at_fem_l method=hybrid
    ObjectGroup right_leg: members=(addbrev_r addlong_r addmagDist_r addmagIsch_r addmagMid_r addmagProx_r bflh140_r bfsh140_r edl_r ehl_r fdl_r fhl_r gaslat140_r gasmed_r glmax1_r glmax2_r glmax3_r glmed1_r glmed2_r glmed3_r glmin1_r glmin2_r glmin3_r grac_r iliacus_r perbrev_r perlong_r piri_r psoas_r recfem_r sart_r semimem_r semiten_r soleus_r tfl_r tibant_r tibpost_r vasint_r vaslat140_r vasmed_r)
    ObjectGroup left_leg: members=(addbrev_l addlong_l addmagDist_l addmagIsch_l addmagMid_l addmagProx_l bflh140_l bfsh140_l edl_l ehl_l fdl_l fhl_l gaslat140_l gasmed_l glmax1_l glmax2_l glmax3_l glmed1_l glmed2_l glmed3_l glmin1_l glmin2_l glmin3_l grac_l iliacus_l perbrev_l perlong_l piri_l psoas_l recfem_l sart_l semimem_l semiten_l soleus_l tfl_l tibant_l tibpost_l vasint_l vaslat140_l vasmed_l)
    ObjectGroup hip_add_r: members=(addbrev_r addlong_r addmagDist_r addmagIsch_r addmagMid_r addmagProx_r bflh140_r grac_r semimem_r semiten_r)
    ObjectGroup hip_abd_r: members=(glmax1_r glmed1_r glmed2_r glmed3_r glmin1_r glmin2_r glmin3_r piri_r sart_r tfl_r)
    ObjectGroup hip_flex_r: members=(addbrev_r addlong_r glmin1_r grac_r iliacus_r psoas_r recfem_r sart_r tfl_r)
    ObjectGroup hip_ext_r: members=(addlong_r addmagDist_r addmagIsch_r addmagMid_r addmagProx_r bflh140_r glmax1_r glmax2_r glmax3_r glmed1_r glmed2_r glmed3_r glmin3_r semimem_r semiten_r)
    ObjectGroup hip_inrot_r: members=(glmed1_r glmed2_r glmed3_r glmin1_r iliacus_r psoas_r tfl_r)
    ObjectGroup hip_exrot_r: members=(glmin3_r piri_r)
    ObjectGroup knee_flex_r: members=(bflh140_r bfsh140_r gaslat140_r gasmed_r grac_r sart_r semimem_r semiten_r)
    ObjectGroup knee_ext_r: members=(recfem_r vasint_r vaslat140_r vasmed_r)
    ObjectGroup ankle_df_r: members=(edl_r ehl_r tibant_r)
    ObjectGroup ankle_pf_r: members=(fdl_r fhl_r gaslat140_r gasmed_r perbrev_r perlong_r soleus_r tibpost_r)
    ObjectGroup everter_r: members=(edl_r perbrev_r perlong_r)
    ObjectGroup inverter_r: members=(ehl_r fdl_r fhl_r tibant_r tibpost_r)
    ObjectGroup hip_add_l: members=(addbrev_l addlong_l addmagDist_l addmagIsch_l addmagMid_l addmagProx_l bflh140_l grac_l semimem_l semiten_l)
    ObjectGroup hip_abd_l: members=(glmax1_l glmed1_l glmed2_l glmed3_l glmin1_l glmin2_l glmin3_l piri_l sart_l tfl_l)
    ObjectGroup hip_flex_l: members=(addbrev_l addlong_l glmin1_l grac_l iliacus_l psoas_l recfem_l sart_l tfl_l)
    ObjectGroup hip_ext_l: members=(addlong_l addmagDist_l addmagIsch_l addmagMid_l addmagProx_l bflh140_l glmax1_l glmax2_l glmax3_l glmed1_l glmed2_l glmed3_l glmin3_l semimem_l semiten_l)
    ObjectGroup hip_exrot_l: members=(glmin3_l piri_l)
    ObjectGroup hip_inrot_l: members=(glmed1_l glmed2_l glmed3_l glmin1_l iliacus_l psoas_l tfl_l)
    ObjectGroup knee_flex_l: members=(bflh140_l bfsh140_l gaslat140_l gasmed_l grac_l sart_l semimem_l semiten_l)
    ObjectGroup knee_ext_l: members=(recfem_l vasint_l vaslat140_l vasmed_l)
    ObjectGroup ankle_df_l: members=(edl_l ehl_l tibant_l)
    ObjectGroup ankle_pf_l: members=(fdl_l fhl_l gaslat140_l gasmed_l perbrev_l perlong_l soleus_l tibpost_l)
    ObjectGroup everter_l: members=(edl_l perbrev_l perlong_l)
    ObjectGroup inverter_l: members=(ehl_l fdl_l fhl_l tibant_l tibpost_l)
  MarkerSet:
    Marker ASIS_R: pelvis (0.023864 0 0.132446) fixed=true
    Marker ASIS_L: pelvis (0.023864 0 -0.132446) fixed=true
    Marker PSIS_R: pelvis (-0.165825 0.0153146 0.0344375)
    Marker PSIS_L: pelvis (-0.169546 0.0102761 -0.0275574)
    Marker GT_R: femur_r (-0.0120905 -0.0336526 0.0936773)
    Marker GT_L: femur_l (-0.0201762 -0.00144073 -0.0877717)
    Marker Thigh_R_1: femur_r (0.00663184 -0.165768 0.101441)
    Marker Thigh_R_2: femur_r (0.0483511 -0.164785 0.0931417)
    Marker Thigh_R_3: femur_r (0.0486948 -0.195805 0.0906653)
    Marker Thigh_R_4: femur_r (0.00685539 -0.197173 0.0995622)
    Marker Knee_R_L_Cond: femur_r (-0.000566383 -0.411402 0.0458896)
    Marker Knee_R_M_Cond: femur_r (-0.0115007 -0.417845 -0.0538975)
    Marker Thigh_L_1: femur_l (0.0649884 -0.154315 -0.086332)
    Marker Thigh_L_2: femur_l (0.0244764 -0.157031 -0.100544)
    Marker Thigh_L_3: femur_l (0.0252724 -0.187116 -0.0974639)
    Marker Thigh_L_4: femur_l (0.0657233 -0.185174 -0.0840562)
    Marker Knee_L_L_Cond: femur_l (0.0123694 -0.416102 -0.0452405)
    Marker Knee_L_M_Cond: femur_l (6.76227e-5 -0.422092 0.0516283)
    Marker Tib_Tib_R: tibia_r (0.0149967 -0.0330739 2.29537e-5)
    Marker Tib_Tub_L: tibia_l (0.0251753 -0.024496 0.00191155)
    Marker Shank_R_1: tibia_r (-0.076546 -0.0673323 0.0795782)
    Marker Shank_R_2: tibia_r (-0.0335304 -0.0645528 0.0793543)
    Marker Shank_R_3: tibia_r (-0.0316132 -0.0947343 0.0821284)
    Marker Shank_R_4: tibia_r (-0.0750231 -0.0976965 0.0823161)
    Marker Shank_L_1: tibia_l (-0.0208166 -0.0682703 -0.0846811)
    Marker Shank_L_2: tibia_l (-0.0652252 -0.064777 -0.0808057)
    Marker Shank_L_3: tibia_l (-0.0681981 -0.0943446 -0.0812396)
    Marker Shank_L_4: tibia_l (-0.0253845 -0.0982181 -0.0841222)
    Marker Ankle_R_L_Mal: tibia_r (-0.0190386 -0.366175 0.043876)
    Marker Ankle_R_M_Mal: tibia_r (-0.00724626 -0.350183 -0.0388729)
    Marker Ankle_L_L_Mal: tibia_l (-0.0124957 -0.360314 -0.0433491)
    Marker Ankle_L_M_Mal: tibia_l (-0.0135933 -0.351648 0.0405929)
    Marker Foot_R_MH_1_Top: calcn_r (0.185261 0.026146 -0.0423003)
    Marker Foot_R_MH_5_Top: calcn_r (0.151864 0.0230161 0.0582463)
    Marker Foot_R_Calc: calcn_r (-0.0167262 0.0237672 -0.0100433)
    Marker Foot_R_Center: calcn_r (0.102139 0.0260975 0.0501743)
    Marker Foot_L_MH_1_Top: calcn_l (0.188517 0.0330128 0.04282)
    Marker Foot_L_MH_5_Top: calcn_l (0.15986 0.0110205 -0.0651333)
    Marker Foot_L_Calc: calcn_l (-0.0142216 0.0142592 0.00831837)
    Marker Foot_L_Center: calcn_l (0.0953551 0.0148589 -0.0516113)
    Marker right_hjc: femur_r (0 0 0) fixed=true
    Marker left_hjc: femur_l (0 0 0) fixed=true
    Marker right_kjc: femur_r (-0.0038361 -0.440855 -0.00149182) fixed=true
    Marker left_kjc: femur_l (-0.00373082 -0.451282 0.00145087) fixed=true
    Marker right_ajc: tibia_r (-0.00953307 -0.359257 0) fixed=true
    Marker left_ajc: tibia_l (-0.00945402 -0.355948 0) fixed=true
    Marker right_met_1_floor: calcn_r (0.177138 -0.0477621 -0.0366568) fixed=true
    Marker right_met_5_floor: calcn_r (0.141301 -0.0477621 0.0589127) fixed=true
    Marker right_calc_floor: calcn_r (-0.025598 -0.0477621 -0.00654586) fixed=true
    Marker right_ajc_floor: calcn_r (0.0499366 -0.0477621 -0.0103686) fixed=true
    Marker right_mid_met_floor: calcn_r (0.15922 -0.0477621 0.011128) fixed=true
    Marker left_met_1_floor: calcn_l (0.180754 -0.0480836 0.0386491) fixed=true
    Marker left_met_5_floor: calcn_l (0.144186 -0.0480836 -0.0621146) fixed=true
    Marker left_calc_floor: calcn_l (-0.0261206 -0.0480836 0.00690162) fixed=true
    Marker left_ajc_floor: calcn_l (0.050956 -0.0480836 0.0109322) fixed=true
    Marker left_mid_met_floor: calcn_l (0.16247 -0.0480836 -0.0117328) fixed=true
    Marker mid_asis: pelvis (0.023864 0 0) fixed=true
    Marker mid_psis: pelvis (-0.162275 0.0236254 0) fixed=true
    Marker mid_pelvis: pelvis (-0.0692055 0.0118127 0) fixed=true
    Marker mid_hjc: pelvis (-0.0537187 -0.0772649 0) fixed=true
